##ORIENTATIONS
********************
*** ORIENTATIONS ***
********************
** Orientation vectors
** 1st vector represents the fibre direction
** 2nd vector is an arbitrary vector perpendicular to the first
*Distribution Table, Name=TexGenOrientationVectors
COORD3D,COORD3D
*Distribution, Location=Element, Table=TexGenOrientationVectors, Name=TexGenOrientationVectors, Input=dryFabric.ori
*Orientation, Name=TexGenOrientations, Definition=coordinates
TexGenOrientationVectors
1, 0
##MATERIALS
*****************
*** MATERIALS ***
*****************
*Material, Name=Mat0
*Elastic
3e+09, 0.2
*Damping, alpha= 3.75e+6
*Density
1.37e-09,
*DepVar
5
*Material, Name=Mat1
*Elastic, type=ENGINEERING CONSTANTS
2e+11, 1e+10, 1e+10, 0.3, 0.4, 0.4, 5e+09, 5e+09
5e+09
*Damping, alpha= 3.75e+6
*Density
1.37e-09,
*DepVar
5

*Solid Section, ElSet=Yarn0, Material=Mat1, Orientation=TexGenOrientations, controls=HourglassEnhanced
1.0,
*Solid Section, ElSet=Yarn1, Material=Mat1, Orientation=TexGenOrientations, controls=HourglassEnhanced
1.0,
*Solid Section, ElSet=Yarn2, Material=Mat1, Orientation=TexGenOrientations, controls=HourglassEnhanced
1.0,
*Solid Section, ElSet=Yarn3, Material=Mat1, Orientation=TexGenOrientations, controls=HourglassEnhanced
1.0,
*Section Controls, Name=HourglassEnhanced, Hourglass=Enhanced, SECOND ORDER ACCURACY=YES
** Note: Additional element data are stored as a depvars:
## ELEMENTDATA
********************
*** ELEMENT DATA ***
********************
** Element data stored as a depvars
** 1 - Element index
** 2 - Yarn Index (-1 for matrix, first yarn starting at 0)
** 3/4 - Location (x and y cross-section coordinates of element relative to yarn centerline)
** 5 - Volume fraction
** 6 - Distance of element from the surface of the yarn (for yarn elements only, distance is negative)
*Initial Conditions, Type=Solution, Input=dryFabric.eld

***************************
*** SURFACE DEFINITIONS ***
***************************
*Surface, Name=Yarn0Lower, Type=Element
205, S1
206, S1
207, S1
208, S1
369, S3
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206, S3
*Surface, Name=Yarn0Upper, Type=Element
1, S2
2, S2
3, S2
4, S2
369, S2
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208, S4
*Surface, Name=Yarn1Lower, Type=Element
*Surface, Name=Yarn1Upper, Type=Element
*Surface, Name=Yarn2Lower, Type=Element
209, S2
210, S2
211, S2
212, S2
285, S1
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286, S3
*Surface, Name=Yarn2Upper, Type=Element
2259, S5
2260, S5
2261, S5
2262, S5
2263, S5
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288, S4
*Surface, Name=Yarn3Lower, Type=Element
2961, S3
2962, S3
2963, S3
2964, S3
2965, S3
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366, S3
*Surface, Name=Yarn3Upper, Type=Element
289, S2
290, S2
291, S2
292, S2
365, S1
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

##INTERACTION
************
*** INTERACTION PROPERTIES ***
************
*Surface Interaction, name=YARN
*Friction
0.112,
*Surface Behavior, pressure-overclosure=HARD


***************************
*** CONTACT DEFINITIONS ***
***************************
*Contact Pair, Interaction=Yarn
Yarn0Upper, Yarn2Lower
*Contact Pair, Interaction=Yarn
Yarn1Upper, Yarn3Lower
*Contact Pair, Interaction=Yarn
Yarn2Upper, Yarn1Lower
*Contact Pair, Interaction=Yarn
Yarn3Upper, Yarn0Lower
