*Heading
File generated by TexGen v3.13.1
************
*** MESH ***
************
*Node
1, -0.406926, 0.275618, 0.0667846
2, -0.408046, 0.245711, 0.0590484
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*Element, Type=C3D6
1, 60, 80, 79, 1, 21, 20
2, 78, 99, 98, 19, 40, 39
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*Element, Type=C3D8R
369, 60, 61, 81, 80, 1, 2, 22, 21
370, 61, 62, 82, 81, 2, 3, 23, 22
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********************
*** ORIENTATIONS ***
********************
** Orientation vectors
** 1st vector represents the fibre direction
** 2nd vector is an arbitrary vector perpendicular to the first
*Distribution Table, Name=TexGenOrientationVectors
COORD3D,COORD3D
*Distribution, Location=Element, Table=TexGenOrientationVectors, Name=TexGenOrientationVectors, Input=dryFabric.ori
*Orientation, Name=TexGenOrientations, Definition=coordinates
TexGenOrientationVectors
1, 0
********************
*** ELEMENT SETS ***
********************
** TexGen generates a number of element sets:
** All - Contains all elements
** Matrix - Contains all elements belonging to the matrix
** YarnX - Where X represents the yarn index
*ElSet, ElSet=All, Generate
1, 3680, 1
*ElSet, ElSet=Yarn0
1, 2, 3, 4, 5, 6
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*ElSet, ElSet=Yarn2
209, 210, 211, 212, 213, 214
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*ElSet, ElSet=Yarn3
289, 290, 291, 292, 293, 294
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*****************
*** MATERIALS ***
*****************
*Material, Name=Mat0
*Elastic
3e+09, 0.2
*Damping, alpha= 3.75e+6
*Density
1.37e-09,
*DepVar
5
*Material, Name=Mat1
*Elastic, type=ENGINEERING CONSTANTS
2e+11, 1e+10, 1e+10, 0.3, 0.4, 0.4, 5e+09, 5e+09
5e+09
*Damping, alpha= 3.75e+6
*Density
1.37e-09,
*DepVar
5
*Solid Section, ElSet=Yarn0, Material=Mat1, Orientation=TexGenOrientations, controls=HourglassEnhanced
1.0,
*Solid Section, ElSet=Yarn1, Material=Mat1, Orientation=TexGenOrientations, controls=HourglassEnhanced
1.0,
*Solid Section, ElSet=Yarn2, Material=Mat1, Orientation=TexGenOrientations, controls=HourglassEnhanced
1.0,
*Solid Section, ElSet=Yarn3, Material=Mat1, Orientation=TexGenOrientations, controls=HourglassEnhanced
1.0,
*Section Controls, Name=HourglassEnhanced, Hourglass=Enhanced, SECOND ORDER ACCURACY=YES
** Note: Additional element data are stored as a depvars:
********************
*** ELEMENT DATA ***
********************
** Element data stored as a depvars
** 1 - Element index
** 2 - Yarn Index (-1 for matrix, first yarn starting at 0)
** 3/4 - Location (x and y cross-section coordinates of element relative to yarn centerline)
** 5 - Volume fraction
** 6 - Distance of element from the surface of the yarn (for yarn elements only, distance is negative)
*Initial Conditions, Type=Solution, Input=dryFabric.eld
***************************
*** SURFACE DEFINITIONS ***
***************************
*Surface, Name=Yarn0Lower, Type=Element
205, S1
206, S1
207, S1
208, S1
369, S3
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206, S3
*Surface, Name=Yarn0Upper, Type=Element
1, S2
2, S2
3, S2
4, S2
369, S2
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208, S4
*Surface, Name=Yarn1Lower, Type=Element
*Surface, Name=Yarn1Upper, Type=Element
*Surface, Name=Yarn2Lower, Type=Element
209, S2
210, S2
211, S2
212, S2
285, S1
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286, S3
*Surface, Name=Yarn2Upper, Type=Element
2259, S5
2260, S5
2261, S5
2262, S5
2263, S5
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288, S4
*Surface, Name=Yarn3Lower, Type=Element
2961, S3
2962, S3
2963, S3
2964, S3
2965, S3
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366, S3
*Surface, Name=Yarn3Upper, Type=Element
289, S2
290, S2
291, S2
292, S2
365, S1
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368, S4
************
*** INTERACTION PROPERTIES ***
************
*Surface Interaction, name=YARN
*Friction
0.112,
*Surface Behavior, pressure-overclosure=HARD
************
*** STEP ***
************
*Step, NLGeom=Yes
*Dynamic, Explicit
,2.5e-5
*Bulk Viscosity
0.06, 1.2
***************************
*** CONTACT DEFINITIONS ***
***************************
*Contact Pair, Interaction=Yarn
Yarn0Upper, Yarn2Lower
*Contact Pair, Interaction=Yarn
Yarn1Upper, Yarn3Lower
*Contact Pair, Interaction=Yarn
Yarn2Upper, Yarn1Lower
*Contact Pair, Interaction=Yarn
Yarn3Upper, Yarn0Lower
*Output, History, Variable=PRESELECT
*Output, Field, Variable=PRESELECT
*Element Output
SDV
*Boundary
*Amplitude, name=Amp-1
0., 0., 2.5e-05, 1.
*Boundary, amplitude=Amp-1
*** Constrain the nodes closest to the geometrical center of each yarns
1564, 1, 1, 0
1564, 2, 2, 0
1564, 3, 3, 0
3747, 1, 1, 0
3747, 2, 2, 0
3747, 3, 3, 0
4986, 1, 1, 0
4986, 2, 2, 0
4986, 3, 3, 0
*** Apply the repeat vector constraints
Dummy0, 1, 1, 0
Dummy0, 2, 2, 0
Dummy0, 3, 3, 0
Dummy1, 1, 1, 0
Dummy1, 2, 2, 0
Dummy1, 3, 3, 0
*End Step
